// COMSOL Multiphysics 6.2.0.290 model "EXP6.mph"
// Outline of the model tree

Parameters
  rc = 5[um]  // Core radius
  rclad = (125/2)[um]  // Cladding Radius
  wavelength = 1.55[um]  // operating wavelength
  PML = 20[um]

Coordinate systems
  pml1: PML "Perfectly Matched Layer 1" on domains 1 | ScalingType = Cylindrical; stretchingType = rational

Geometry
  geom1 "Geometry 1" (2D, length unit µm)
    c2: Circle "Cladding" | r = rclad
    c3: Circle "PML" | r = rclad+PML
    e1: Ellipse | semiaxes = {10, 4}
    fin: Finalize "Form Union"

Materials
  mat1: Common "Material 1" on domains 3
    RefractiveIndex
      n = 1.49
      ki = 0
  mat2: Common "Material 2" on domains 1, 2
    RefractiveIndex
      n = 1.45
      ki = 0

Physics
  ewfd: ElectromagneticWavesFrequencyDomain on all domains
    dependent variable E = {Ex, Ey, Ez}
    wee1: WaveEquationElectric (default)
    pec1: PerfectElectricConductor (default)
    init1: init "Initial Values 1" (default)

Mesh
  mesh1 "Mesh 1"
    size: MeshSizeDefault | hmax = 3; hauto = 9
    size1: Size on domains 3 | hmax = 3; hauto = 9
    size2: Size on domains 1, 2 | hmax = 5; hauto = 9
    ftri1: FreeTri "Free Triangular 1" on domains 1-3

Studies
  std1 "Study 1"
    param: Parametric "Parametric Sweep" (disabled)
      pname = wavelength
      plistarr = range(1400[nm],10[nm],1600[nm])
      punit = nm
    mode: ModeAnalysis | modeFreq = c_const/wavelength; neigs = 10; shift = 1.49; conrad = 1

Solver configurations
  sol1 "Solution 1" (study std1)
    v1: Variables "Dependent Variables 1"
    e1: Eigenvalue "Eigenvalue Solver 1" | neigs = 10; shift = 1.49
      d1: Direct "Suggested Direct Solver (ewfd)"
  sol2 "Parametric Solutions 1" (study std1)

Datasets
  dset1: Solution | solution = sol1
  dset2: Solution | solution = sol2

Derived values
  gev1: EvalGlobal "Global Evaluation 1" | data = dset1; table = tbl1; expr = {real(ewfd.neff), imag(ewfd.neff)}

Tables
  tbl1: Table
    // Global Evaluation 1
    Effective mode index | real(ewfd.neff) (1) | imag(ewfd.neff) (1)
    1.47853-1.39072e-12i | 1.47853 | -1.39072e-12
    1.47869-1.11315e-11i | 1.47869 | -1.11315e-11
    1.4795-9.79687e-13i | 1.4795 | -9.79687e-13
    1.47954-1.93169e-13i | 1.47954 | -1.93169e-13
    1.4821+4.18119e-18i | 1.4821 | 4.18119e-18
    1.48219+4.96013e-18i | 1.48219 | 4.96013e-18
    1.48486-3.05928e-18i | 1.48486 | -3.05928e-18
    1.48493+7.16486e-19i | 1.48493 | 7.16486e-19
    1.48687-1.14185e-18i | 1.48687 | -1.14185e-18
    1.48693+8.41193e-19i | 1.48693 | 8.41193e-19

Plots
  pg2: PlotGroup2D "Electric Field (ewfd) 1" | data = dset2
    surf1: Surface | expr = ewfd.normE
    arws1: ArrowSurface | expr = {ewfd.Ex, ewfd.Ey}
  pg3: PlotGroup2D "Electric Field (ewfd)" | data = dset1
    surf1: Surface | expr = ewfd.normE
    arws1: ArrowSurface | expr = {ewfd.Hx, ewfd.Hy}