// COMSOL Multiphysics 6.2.0.290 model "exp5.mph"
// Outline of the model tree

Parameters
  core_dia = 5[um]
  clad_dia = (125/2)[um]
  pml = 15[um]
  c = 3E8[m/s]
  lam = 1400 [nm]

Coordinate systems
  pml1: PML "Perfectly Matched Layer 1" on domains 1 | ScalingType = Cylindrical

Geometry
  geom1 "Geometry 1" (2D, length unit µm)
    c1: Circle "core" | r = core_dia/2
    c2: Circle "clad" | r = clad_dia/2
    c3: Circle "pml" | r = (clad_dia+pml)/2
    e1: Ellipse (disabled) | semiaxes = {10, 4}
    fin: Finalize "Form Union"

Materials
  mat1: Common "core" on domains 3
    RefractiveIndex
      n = 1.49
      ki = 0
  mat2: Common "clad" on domains 1, 2
    RefractiveIndex
      n = 1.48
      ki = 0

Physics
  ewfd: ElectromagneticWavesFrequencyDomain on all domains
    dependent variable E = {Ex, Ey, Ez}
    wee1: WaveEquationElectric (default)
    pec1: PerfectElectricConductor (default)
    init1: init "Initial Values 1" (default)

Mesh
  mesh1 "Mesh 1"
    size: MeshSizeDefault | hmax = 0.16610; hmin = 0.0049830; hcurve = 0.3; hgrad = 1.3; custom = on
    size2: Size on domains 3 | hauto = 1
    size3: Size on domains 1, 2 | hauto = 4
    ftri1: FreeTri "Free Triangular 1" on domains 1-3

Studies
  std1 "Study 1"
    param: Parametric "Parametric Sweep" | pname = lam; plistarr = range(1400,10,1600); punit = nm
    mode: ModeAnalysis | modeFreq = c/lam; neigs = 10; shift = 1.49; conrad = 1; conradynhm = 1; linpsolnum = auto

Solver configurations
  sol1 "Solution 1" (study std1)
    v1: Variables "Dependent Variables 1"
    e1: Eigenvalue "Eigenvalue Solver 1" | neigs = 10; shift = 1.49
      d1: Direct "Suggested Direct Solver (ewfd)"
  sol2 "Parametric Solutions 1" (study std1)
  sol9 "Parametric Solutions 2" (study std1)

Datasets
  dset1: Solution | solution = sol1
  dset2: Solution | solution = sol2
  dset3: Solution | solution = sol9

Derived values
  gev1: EvalGlobal "x_polarized light" | data = dset3; table = tbl1; expr = abs(imag(ewfd.neff))

Tables
  tbl1: Table
    // x_polarized light
    lam (nm) | Effective mode index | abs(imag(ewfd.neff)) (1)
    1400 | 1.48393-7.62623e-18i | 7.62623e-18
    1410 | 1.48389-1.54794e-17i | 1.54794e-17
    1420 | 1.48384-2.74862e-17i | 2.74862e-17
    1430 | 1.4838-4.85973e-17i | 4.85973e-17
    1440 | 1.48375-7.83792e-17i | 7.83792e-17
    1450 | 1.4837-1.25367e-16i | 1.25367e-16
    1460 | 1.48366-1.95224e-16i | 1.95224e-16
    1470 | 1.48361-3.01467e-16i | 3.01467e-16
    1480 | 1.48357-4.56581e-16i | 4.56581e-16
    1490 | 1.48352-6.79693e-16i | 6.79693e-16
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
Plots
  pg1: PlotGroup2D "Electric Field (ewfd)" | data = dset1
    surf1: Surface | expr = ewfd.normE
    arws1: ArrowSurface | expr = {ewfd.Hx, ewfd.Hy}
  pg2: PlotGroup2D "Electric Field (ewfd) 1" | data = dset3
    surf1: Surface | expr = ewfd.normE
    arws1: ArrowSurface | expr = {ewfd.Hx, ewfd.Hy}
  pg3: PlotGroup2D "Electric Field (ewfd) 2" | data = dset3
    surf1: Surface | expr = ewfd.normE
  pg4: PlotGroup1D "1D Plot Group 4" | data = none
    tblp1: Table "Table Graph 1" | table = tbl1